OpenVSP model (file version 5), 4 components.
Geometry view with OpenVSP parameter names; values to 6 digits, angles in degrees, lengths in the model's unit.
Overall bounding box: X_Min=-2.42 X_Len=8.17438 Y_Min=-5.28936 Y_Len=10.5787 Z_Min=-0.662836 Z_Len=2.57284

Wing "Wing"
  location (X Y Z) -0.42 0 0.71, rotation 0 0 0
  symmetric about XZ
  bounding box size 1.67 10.5787 0.302101
  totals: TotalSpan=10.58 TotalProjectedSpan=10.5758 TotalChord=1.58333 TotalArea=16.2906 TotalAR=6.86581 MAC=1.55806
  root: chord 1.67, twist 0, CST airfoil ContLERad=0 LowDegree=6 ThickChord=0.120383 UpDegree=6 Au=[0.178888 0.241575 0.152555 0.261605 0.165982 0.215382 0.207264] Al=[-0.178888 -0.0348886 -0.22387 0.0201527 -0.14493 -0.0608702 -0.0725077]
  sections:
    n  Span  Root_Chord  Tip_Chord  Area    Sweep  Sweep_Location  Dihedral  Twist  Twist_Location  tip airfoil
    1  0.55  1.67        1.67       0.9185  0      0               0         0      0.25            as above
    2  2.09  1.67        1.67       3.4903  0      0               1.7       0      0.25            as above
    3  2.65  1.67        1.15       3.7365  3.9    0               1.7       0      0.25            as above
  SS_Control "Aileron": EtaStart=0.55 EtaEnd=0.95 Length_C_Start=0.25 Length_C_End=0.25 Length_Start=0.404279 Length_End=0.300475 LE_Flag=0 Surf_Type=2

Wing "Tail"
  location (X Y Z) 4 0 0.35, rotation 0 0 0
  symmetric about XZ
  bounding box size 1.36102 3.34 0.158472
  totals: TotalSpan=3.34 TotalProjectedSpan=3.34 TotalChord=1.02 TotalArea=3.5462 TotalAR=3.14579 MAC=1.08165
  root: chord 0.9, twist 0, NACA 4-series Camber=0 CamberLoc=0.2 ThickChord=0.12
  sections:
    n  Span  Root_Chord  Tip_Chord  Area    Sweep  Sweep_Location  Dihedral  Twist  Twist_Location  tip airfoil
    1  0.1   0.9         0.88       0.089   9.7    0               0         0      0.25            as above
    2  0.14  0.88        1.32       0.154   9.7    0               0         0      0.25            as above
    3  1.43  1.32        0.82       1.5301  9.7    0               0         0      0.25            NACA 4-series Camber=0 CamberLoc=0.2 ThickChord=0.09
  SS_Control "Elevator": EtaStart=0.08 EtaEnd=0.95 Length_C_Start=0.3 Length_C_End=0.3 Length_Start=0.29568 Length_End=0.254759 LE_Flag=0 Surf_Type=2

Wing "TailV"
  location (X Y Z) 2.09 0 0.13, rotation 90 0 0
  bounding box size 3.66438 0.296284 1.78
  totals: TotalSpan=1.78 TotalProjectedSpan=1.78 TotalChord=1.90125 TotalArea=2.9546 TotalAR=1.07236 MAC=2.15241
  root: chord 2.71, twist 0, NACA 4-series Camber=0 CamberLoc=0.2 ThickChord=0.09
  sections:
    n  Span  Root_Chord  Tip_Chord  Area    Sweep  Sweep_Location  Dihedral  Twist  Twist_Location  tip airfoil
    1  0.38  2.71        3.29       1.14    0      0               0         0      0.25            as above
    2  0.31  3.29        1.43       0.7316  80.9   0               0         0      0.25            as above
    3  0.16  1.43        1.18       0.2088  61.7   0               0         0      0.25            as above
    4  0.93  1.18        0.7        0.8742  38.2   0               0         0      0.25            NACA 4-series Camber=0 CamberLoc=0.2 ThickChord=0.06
  SS_Control "Rudder": EtaStart=0.08 EtaEnd=0.95 Length_C_Start=0.3 Length_C_End=0.3 Length_Start=0.878204 Length_End=0.223781 LE_Flag=0 Surf_Type=2

Fuselage "Fuselage"
  location (X Y Z) -2.42 0 0, rotation 0 0 0
  bounding box size 7.23 1.23139 1.59825
  Design: Length=7.23
  cross sections:
    n  XLocPercent  YLocPercent  ZLocPercent  shape
    0  0            0            0            point
    1  0.0746888    0            -0.00691563  super ellipse Super_Height=0.52 Super_M=2 Super_MaxWidthLoc=0.29 Super_N=2 Super_Width=0.82
    2  0.149378     0            -0.02213     super ellipse Super_Height=0.98 Super_M=2 Super_MaxWidthLoc=0.29 Super_N=2.69 Super_Width=1
    3  0.210235     0            -0.0193638   super ellipse Super_Height=1.04 Super_M=2 Super_MaxWidthLoc=0.24 Super_N=4 Super_Width=1.07
    4  0.275242     0            0.0124481    general fuselage BotStr=1.5 BotTanAngle=90 CornerRad=0 Height=1.45 LowStr=1 MaxWidthLoc=0 TopStr=2 TopTanAngle=90 UpStr=1.5 Width=1.1
    5  0.507607     0            0.0193638    general fuselage BotStr=1.5 BotTanAngle=90 CornerRad=0 Height=1.22 LowStr=1 MaxWidthLoc=0 TopStr=1.5 TopTanAngle=90 UpStr=1.5 Width=1.1
    6  0.586445     0            0.00968188   super ellipse Super_Height=0.88 Super_M=3 Super_MaxWidthLoc=0 Super_N=3 Super_Width=0.97
    7  0.986169     0            0.0428769    super ellipse Super_Height=0.36 Super_M=2 Super_MaxWidthLoc=0 Super_N=2 Super_Width=0.1
    8  1            0            0.0428769    point

VSPAERO settings: Sref=16.17 bref=11 cref=1.49 Xcg=0 Ycg=0 Zcg=0.71 AlphaStart=-14 AlphaEnd=19 AlphaNpts=34 BetaStart=0 BetaEnd=0 BetaNpts=1 MachStart=0.19 MachEnd=0 MachNpts=1 ReCref=1e+07 Vinf=100 Rho=0.002377
  control group "Aileron": DeflectionAngle=-0.5
  control group "Elevator": DeflectionAngle=-4.81492
  control group "Rudder": DeflectionAngle=0
